// SBML level 2 version 1

model Wolf2001_Respiratory_Oscillations()
  // This model by Jana Wolf et al. 2001 is the first mechanistic model of respiratory oscillations in Saccharomyces cerevisae. It is based on the assumption that feedback inhibition of cysteine on the sulfate transporters leads to oscillations in this pathway and causes oscillations in respiratory activity via inhibition of cytochrome c oxidase by hydrogen disulfide. The model is qualitative/semi-quantitative and reproduces the respiratory oscillation pattern quite well. It is based on very coarse-grained representations of the mitochondrial tricarboxylic acid cycle and the mitochondrial electron transport chain (oxidative phosphorylation). The sulfate assimilatory pathways also contains some significant simplifcations.
  // The model corresponds to Fig. 2B of the paper, with a slight phase shift of the oscillations. No initial conditions were given in the paper, and thus they were chosen arbitrarily in a range that lies within the basin of attraction of the limit cycle oscillations. Species IDs correspond to IDs used by the authors, while SBML names are more common abbreviations.
  // Caveats:
  // 1) Equilibrated transport:
  // The model assumes fast equilibration between mitochondria and cytoplasm for the metabolites NADH, NAD+, H2S and Acetyl-CoA.
  // 2) Cytosolic mass conservation ATP/ADP:
  // The model uses mass conservation for cytosolic adenosine nucleotides with is however not encoded in the stoichiometry, but is implied by the lumped reaction v4. This reaction combines the enzymatic reactions of phosphoadenylyl-sulfate reductase (thioredoxin) (yeast protein Met16p, EC 1.8.4.8) and sulfite reductase (NADPH) (subunits Met5p and Met10p, EC 1.8.1.2). EC 1.8.4.8 also has adenosine-3',5'-bismonophosphate (PAP, not to confuse with ID pap in this model, standing for PAPS) as a product. PAP is the substrate for enzyme 3'(2'),5'-bisphosphate nucleotidase (Met22p, EC:3.1.3.7) which would revover AMP (and Pi). Then AMP can be assumed to be equilibrated with ATP and ADP via adenylate kinase, as often used in metabolic models. This AMP production is implied in the mass conservation for cytosolic adenosine phosphates. Accounting for these reactions explicitly does not change the dynamics of the model significantly. An according version can be obtained from the SBML creator (Rainer Machne, mailto:raim@tbi.univie.ac.at).
  // 3) Redox balance:
  // The enzyme sulfite reductase (NADPH) (subunits Met5p and Met10p, EC 1.8.1.2, part of reaction v4) actually uses NADPH, and the authors assume equilibration of NADH and NADPH. But actually S. cerevisiae specifically is missing the according enzyme transhydrogenase (EC 1.6.1.1 or EC 1.6.1.2). EC 1.8.4.8 also oxidizes thioredoxin and would actually require an additional NADPH for thioredoxin recovery (reduction). This would slightly affect the redox balance of the model.
  // 4) Energy balance:
  // Reaction v7 lumps NAD-dependent alcohol dehydrogenase (EC 1.1.1.1), aldehyde dehydrogenase (NAD+) (EC 1.2.1.3) and acetyl-CoA synthase (EC 6.2.1.1). The latter reaction would actually consume ATP as a co-factor, producing AMP+PPi, and this is not included in the model. This would slightly bias the model's energy balance.
  // To the extent possible under law, all copyright and related or neighbouring rights to this encoded model have been dedicated to the public domain worldwide. Please refer to CC0 Public Domain Dedication for more information.
  // In summary, you are entitled to use this encoded model in absolutely any manner you deem suitable, verbatim, or with modification, alone or embedded it in a larger context, redistribute it, commercially or not, in a restricted way or not.
  // To cite BioModels Database, please use: Li C, Donizelli M, Rodriguez N, Dharuri H, Endler L, Chelliah V, Li L, He E, Henry A, Stefan MI, Snoep JL, Hucka M, Le Novère N, Laibe C (2010) BioModels Database: An enhanced, curated and annotated resource for published quantitative kinetic models. BMC Syst Biol., 4:92.
  // biomodels.db:MODEL9728951048
  // biomodels.db:BIOMD0000000090
  // isDescribedBy pubmed:11423122
  // hasTaxon taxonomy:4932
  // isVersionOf GO:0019379

  // Compartments:
  compartment external = 1;  // isVersionOf GO:0005576
  compartment cytosol in external = 1;  // isVersionOf GO:0005829
  compartment mitochondria in cytosol = 1;  // isVersionOf GO:0005739

  // Species:
  species $sul_ex in external = 0; sul_ex is "SO4_ex";  // CHEBI:16189
  species $eth_ex in external = 0; eth_ex is "EtOH_ex";  // CHEBI:16236
  species $oxy_ex in external = 0; oxy_ex is "O2_ex";  // CHEBI:15379
  species oxy in mitochondria = 7/mitochondria; oxy is "O2";  // CHEBI:15379
  species $H2O in mitochondria = 0;  // CHEBI:15377
  species A3c in cytosol = 1.5/cytosol; A3c is "ATP";  // CHEBI:15422
  species aps in cytosol = 0.5/cytosol; aps is "APS";  // CHEBI:17709
  species $PPi in cytosol = 0;  // CHEBI:18361
  species pap in cytosol = 0.4/cytosol; pap is "PAPS";  // CHEBI:17980
  species sul in cytosol = 0.4/cytosol; sul is "SO4";  // CHEBI:16189
  species eth in cytosol = 4/cytosol; eth is "EtOH";  // CHEBI:16236
  species $A2c in cytosol; A2c is "ADP";  // CHEBI:16761
  species hyd in cytosol = 0.5/cytosol; hyd is "H2S";  // CHEBI:16136
  species cys in cytosol = 0.3/cytosol; cys is "CYS";  // CHEBI:17561
  species N2 in cytosol = 2/cytosol; N2 is "NADH";  // CHEBI:16908
  species $N1 in cytosol; N1 is "NAD";  // CHEBI:15846
  species aco in cytosol = 0.3/cytosol; aco is "AcCoA";  // CHEBI:15351
  species oah in cytosol = 1.5/cytosol; oah is "OAH";  // CHEBI:16288
  species S1 in mitochondria = 1.5/mitochondria;  // isPartOf GO:0030062
  species $S2 in mitochondria;  // isPartOf GO:0030062
  species $C1 in mitochondria = 0;  // isVersionOf GO:0005746
  species $C2 in mitochondria = 0;  // isVersionOf GO:0005746
  species $A2m in mitochondria; A2m is "ADP_mit";  // CHEBI:16761
  species A3m in mitochondria = 1.5/mitochondria; A3m is "ATP_mit";  // CHEBI:15422
  species $Ho in cytosol = 0;  // CHEBI:24636
  species $Hm in mitochondria = 0;  // CHEBI:24636

  // Parameters:
  k_v0 = 1.6;
  k2 = 0.2;
  k3 = 0.2;
  k4 = 0.2;
  k5 = 0.1;
  k6 = 0.12;
  k7 = 10;
  k8 = 10;
  k9 = 10;
  k_v10 = 80;
  k11 = 10;
  k12 = 5;
  k_v13 = 4;
  k14 = 10;
  k15 = 5;
  k16 = 10;
  k17 = 0.02;
  k18 = 1;
  n = 4;
  m = 4;
  Ka = 1;
  Kc = 0.1;
  a = 0.1;
  Ac = 2;
  Am = 2;
  S = 2;
  N = 2;
  Kh = 0.5;

  // Assignment rules:
  // mass conservation for cytosolic adenosine nucleotides. This mass conservation is not reflected in the model's stoichiometry directly, but implied by other simplifcations. See model notes for details.
  A2c := Ac - A3c;
  // mass conservation for mitochondrial adenosine nucleotides
  A2m := Am - A3m;
  // mass conservation for all cellular nicotine amid dinucleotides
  N1 := N - N2;
  // mass conservation for mitochondrial TCA enzymes
  S2 := S - S1;

  // Reactions:
  v1: $sul_ex => sul; external*k_v0/(1 + (cys/Kc)^n);  // modifiers: cys; isVersionOf GO:0015381
  v13: $eth_ex => eth; external*k_v13;  // isVersionOf GO:0015850
  v2: sul + A3c => aps + $PPi; cytosol*k2*sul*A3c;  // ec-code:2.7.7.4
  // oxygen diffusion
  v10: $oxy_ex => oxy; external*k_v10;
  // oxygen diffusion
  v14: oxy => $oxy_ex; mitochondria*k14*oxy;
  v3: aps + A3c => pap + $A2c; cytosol*k3*aps*A3c;  // ec-code:2.7.1.25; isVersionOf GO:0004020
  // This combined reaction contains phosphoadenylyl-sulfate reductase (thioredoxin) (yeast protein Met16p, EC:1.8.4.8) which also reduces thioredoxin and would actually require an additional NADPH for thioredoxin recovery (reduction), thus a correct stoichiometry would have to include an additional NADPH. This reaction also has adenosine 3',5'-bismonophosphate (PAP) as a product from which the enzyme 3'(2'),5'-bisphosphate nucleotidase (Met22p, EC:3.1.3.7) would revover AMP (and Pi). This latter AMP production is implied in the mass conservation for cytosolic adenosine phosphates (see model notes).
  v4: pap + 3 N2 => hyd + 3 $N1; cytosol*k4*pap*N2;  // hasVersion ec-code:1.8.4.8 ec-code:1.8.1.2
  // This combined reaction contains cystathionine β-synthase (yeast protein Cys4p, EC:4.2.1.22) which would require an additional serine as reactant, and cystathionine γ-lyase (yeast protein Cys3p, EC:4.4.1.1) which has oxo-butanoate as an additional product
  v5: hyd + oah => cys; cytosol*k5*hyd*oah;  // hasVersion ec-code:4.4.1.1 ec-code:4.2.1.22 ec-code:2.5.1.49
  // cysteine usage for glutathione and protein synthesis, other pathways and degradation, no GO term applicable
  v6: cys => ; cytosol*k6*cys;
  // This combined reaction contains the acetyl-CoA synthase (yeast proteins Acs1p and Acs2p, EC 6.2.1.1) which would actually require ATP as a co-substrate (hydrolysed to AMP+PPi)
  v7: eth + 2 $N1 => aco + 2 N2; cytosol*k7*eth*N1;  // hasVersion ec-code:6.2.1.1 ec-code:1.2.1.3 ec-code:1.1.1.1
  // This reaction (L-homoserine-O-acetyltransferase, Met2p, EC:2.3.1.31) has homoserine as an additional reactant and Coenzyme A as an additional product.
  v15: aco => oah; cytosol*k15*aco;  // ec-code:2.3.1.31
  v17: hyd => ; cytosol*k17*hyd;
  // O-acetyl-homoserine usage for other metabolic reactions, no GO term applicable
  v18: oah => ; cytosol*k18*oah;
  // A simplification of the (acetyl-CoA) assimilatory part of the tricarboxylic acid cycle, with implied equilibration of Acetyl-CoA between mitochondria and cytosol
  v8: $S2 + aco => S1; mitochondria*k8*aco*S2;  // isPartOf GO:0006099
  // A simplification of the oxidative (NADH producing) part of the tricarboxylic acid cycle, with implied equilibration between mitochondrial and cytosolic NADH/NAD+
  v9: S1 + 4 $N1 => $S2 + 4 N2; mitochondria*k9*S1*N1;  // isPartOf GO:0006099
  // Reactions v11a, v11a2 and v11b form a minimal description for the oxidative phosphorylation, v11a represents the electron transfer from NAD(P)H to the protein complexes of mitochondrial electron transport chain
  v11a: $C1 + $Hm + N2 => $C2 + $Ho + $N1; mitochondria*k11*N2*oxy/((a*N2 + oxy)*(1 + (hyd/Kh)^m)); v11a is "vET1";  // modifiers: hyd, oxy; GO:0015990; isPartOf GO:0042775; hasVersion GO:0002082
  // Reactions v11a, v11a2 and v11b form a minimal description for the oxidative phosphorylation, v11b represents the electron transfer from the protein complexes of mitochondrial electron transport chain to oxgyen
  v11a2: $C2 + oxy => $C1 + $H2O; mitochondria*k11*N2*oxy/((a*N2 + oxy)*(1 + (hyd/Kh)^m)); v11a2 is "vET2";  // modifiers: hyd, N2; isPartOf GO:0042775; hasVersion GO:0002082; GO:0006123
  // TODO: NOT CLEAR ABOUT CORRECT VOLUME CORRECTION FOR THIS KINETIC LAW OF A TRANSPORT REACTION
  v16: $A2c + A3m => $A2m + A3c; mitochondria*k16*A3m*A2c;  // GO:0005471
  // Reactions v11a, v11a2 and v11b form a minimal description for the oxidative phosphorylation, v11b represents the production of ATP, coupled to the flux of protons from the cytosol to the mitochondria
  v11b: $Ho + $A2m => $Hm + A3m; mitochondria*3*k11*N2*oxy/((a*N2 + oxy)*(1 + (hyd/Kh)^m))*A2m/(Ka + A2m); v11b is "vSYNT";  // modifiers: hyd, N2, oxy; isPartOf GO:0042775; isVersionOf GO:0006119; hasVersion GO:0002082
  // proton leakage of the inner mitochondrial membrane, no GO term applicable. The kinetic law is set to 0 as the leakage is handled in reactions v11a, v11a2 and v11b and the proton gradient is assumed to be in equlibrium.
  vLEAK: $Ho => $Hm; 0;  // isVersionOf GO:0006810
  v12: A3c => $A2c; cytosol*k12*A3c;  // isVersionOf GO:0006200
end
