// SBML level 3 version 1

model wolf()
  // model units - substance: substance

  // Compartments:
  compartment external = 1;  // isVersionOf GO:0005576
  compartment cytosol = 1;  // isVersionOf GO:0005829
  compartment mitochondria = 1;  // isVersionOf GO:0005739

  // Species:
  species $sul_ex in external = 0; sul_ex is "SO4_ex";  // CHEBI:16189
  species $eth_ex in external = 0; eth_ex is "EtOH_ex";  // CHEBI:16236
  species $oxy_ex in external = 0; oxy_ex is "O2_ex";  // CHEBI:15379
  species oxy in mitochondria = 7/mitochondria; oxy is "O2";  // CHEBI:15379
  species $H2O in mitochondria = 0;  // CHEBI:15377
  species A3c in cytosol = 1.5/cytosol; A3c is "ATP";  // CHEBI:15422
  species aps in cytosol = 0.5/cytosol; aps is "APS";  // CHEBI:17709
  species $PPi in cytosol = 0;  // CHEBI:18361
  species pap in cytosol = 0.4/cytosol; pap is "PAPS";  // CHEBI:17980
  species sul in cytosol = 0.4/cytosol; sul is "SO4";  // CHEBI:16189
  species eth in cytosol = 4/cytosol; eth is "EtOH";  // CHEBI:16236
  species $A2c in cytosol; A2c is "ADP";  // CHEBI:16761
  species hyd in cytosol = 0.5/cytosol; hyd is "H2S";  // CHEBI:16136
  species cys in cytosol = 0.3/cytosol; cys is "CYS";  // CHEBI:17561
  species N2 in cytosol = 2/cytosol; N2 is "NADH";  // CHEBI:16908
  species $N1 in cytosol; N1 is "NAD";  // CHEBI:15846
  species aco in cytosol = 0.3/cytosol; aco is "AcCoA";  // CHEBI:15351
  species oah in cytosol = 1.5/cytosol; oah is "OAH";  // CHEBI:16288
  species S1 in mitochondria = 1.5/mitochondria;  // isPartOf GO:0030062
  species $S2 in mitochondria;  // isPartOf GO:0030062
  species $C1 in mitochondria = 0;  // isVersionOf GO:0005746
  species $C2 in mitochondria = 0;  // isVersionOf GO:0005746
  species $A2m in mitochondria; A2m is "ADP_mit";  // CHEBI:16761
  species A3m in mitochondria = 1.5/mitochondria; A3m is "ATP_mit";  // CHEBI:15422
  species $Ho in cytosol = 0;  // CHEBI:24636
  species $Hm in mitochondria = 0;  // CHEBI:24636

  // Parameters:
  Ac = 2;
  N = 2;
  S = 2;
  Am = 2;
  k_v0 = 1.6;
  Kc = 0.1;
  n = 4;
  k_v13 = 4;
  k2 = 0.2;
  k_v10 = 80;
  k14 = 10;
  k3 = 0.2;
  k4 = 0.2;
  k5 = 0.1;
  k6 = 0.12;
  k7 = 10;
  k15 = 5;
  k17 = 0.02;
  k18 = 1;
  k8 = 10;
  k9 = 10;
  k11 = 10;
  a = 0.1;
  Kh = 0.5;
  m = 4;
  k16 = 10;
  Ka = 1;
  k12 = 5;

  // Assignment rules:
  A2c := Ac - A3c;
  N1 := N - N2;
  S2 := S - S1;
  A2m := Am - A3m;

  // Reactions:
  v1: $sul_ex => sul; external*k_v0/(1 + (cys/Kc)^n);  // modifiers: cys; isVersionOf GO:0015381
  v13: $eth_ex => eth; external*k_v13;  // isVersionOf GO:0015850
  v2: sul + A3c => aps + $PPi; cytosol*k2*sul*A3c;  // ec-code:2.7.7.4
  v10: $oxy_ex => oxy; external*k_v10;
  v14: oxy => $oxy_ex; mitochondria*k14*oxy;
  v3: aps + A3c => pap + $A2c; cytosol*k3*aps*A3c;  // ec-code:2.7.1.25; isVersionOf GO:0004020
  v4: pap + 3 N2 => hyd + 3 $N1; cytosol*k4*pap*N2;  // hasVersion ec-code:1.8.4.8 ec-code:1.8.1.2
  v5: hyd + oah => cys; cytosol*k5*hyd*oah;  // hasVersion ec-code:4.4.1.1 ec-code:4.2.1.22 ec-code:2.5.1.49
  v6: cys => ; cytosol*k6*cys;
  v7: eth + 2 $N1 => aco + 2 N2; cytosol*k7*eth*N1;  // hasVersion ec-code:6.2.1.1 ec-code:1.2.1.3 ec-code:1.1.1.1
  v15: aco => oah; cytosol*k15*aco;  // ec-code:2.3.1.31
  v17: hyd => ; cytosol*k17*hyd;
  v18: oah => ; cytosol*k18*oah;
  v8: $S2 + aco => S1; mitochondria*k8*aco*S2;  // isPartOf GO:0006099
  v9: S1 + 4 $N1 => $S2 + 4 N2; mitochondria*k9*S1*N1;  // isPartOf GO:0006099
  v11a: $C1 + $Hm + N2 => $C2 + $Ho + $N1; mitochondria*k11*N2*oxy/((a*N2 + oxy)*(1 + (hyd/Kh)^m)); v11a is "vET1";  // modifiers: hyd, oxy; GO:0015990; isPartOf GO:0042775; hasVersion GO:0002082
  v11a2: $C2 + oxy => $C1 + $H2O; mitochondria*k11*N2*oxy/((a*N2 + oxy)*(1 + (hyd/Kh)^m)); v11a2 is "vET2";  // modifiers: hyd, N2; isPartOf GO:0042775; hasVersion GO:0002082; GO:0006123
  v16: $A2c + A3m => $A2m + A3c; mitochondria*k16*A3m*A2c;  // GO:0005471
  v11b: $Ho + $A2m => $Hm + A3m; mitochondria*3*k11*N2*oxy/((a*N2 + oxy)*(1 + (hyd/Kh)^m))*A2m/(Ka + A2m); v11b is "vSYNT";  // modifiers: hyd, N2, oxy; isPartOf GO:0042775; isVersionOf GO:0006119; hasVersion GO:0002082
  vLEAK: $Ho => $Hm; 0;  // isVersionOf GO:0006810
  v12: A3c => $A2c; cytosol*k12*A3c;  // isVersionOf GO:0006200

  // Unit definitions:
  unit substance_per_volume = mole / litre;
  unit substance = mole;
end
